// SBML level 3 version 2

function Rate_Law_for_reaction_1(beta, S, I, N)
  beta*S*I/N;
end

model main()

  // Compartments:
  compartment Comp1 = 1 dimensionless;

  // Species:
  species Sus in Comp1 = 20;  // substance in dimensionless
  species Infected in Comp1 = num_infected;  // substance in dimensionless
  species Rec in Comp1 = 0;  // substance in dimensionless
  species Water in Comp1 = 10/Comp1;  // substance in dimensionless
  species Air in Comp1 = 0.2*(0.2 + 0.05)*pi + Comp1 - time*identity + Rec;  // substance in dimensionless

  // Parameters:
  param1 = 0.2*(0.2 + 0.05); param1 has dimensionless;
  recovery_rate = 0.1 dimensionless;
  identity = 1 dimensionless;
  num_infected = 2 dimensionless;

  // Rate rules:
  Water' = 0.99*identity + (Sus - Sus)*Comp1 + (pi - pi)*(time - time);

  // Reactions:
  Infection: Sus => Infected; param1*0.1*Sus*Infected*Comp1*pi*time;
  Recovery: Infected => Rec; Infected*recovery_rate*0.1*Water;  // modifiers: Water
    localParam = 0.1;

  // Events:
  spontaneous_recovery: at (time > 1), t0=false: Rec = 20*Rec;
  event1: at (time > 20), t0=false: Water = -20*(-1)*Comp1*time*pi*recovery_rate;
  event2: at (30 < time), t0=false: recovery_rate = Comp1*10;
  event3: at (Comp1*identity*40*pi > time), t0=false: Water = 20;
  nonfunctioning_event: at (Comp1*identity*40*pi > Sus), t0=false: Water = 20;
end
